// COMSOL Multiphysics 5.5.0.359 model "Podosome_rand_wave.mph"
// Outline of the model tree

Parameters
  R0 = 15000 [nm]
  r0 = 1.5 [um]
  Kf = 3.5 [pN/nm]
  kc = 40 [pN/nm]
  x0 = 2800 [nm]
  alpha = 1.5
  gamma = 0.2 [pN/nm]
  Vp0 = 70 [nm/s]
  Vd = 50[nm/s]
  F0 = 1000 [pN]
  Fp0 = 20000 [pN]
  d0 = 1500 [nm]
  phi = cos(pi/4)
  beta = 0.5 [nm/s]
  mu = 0.06 [1/nm]

Functions
  rect1: Rectangle | funcname = rect; lower = 0; upper = 1
  rn1: Random | funcname = randn; nargs = 2; type = normal; seed = 113013
  rect2: Rectangle "Rectsmooth" | lower = 0; upper = 1; smooth = 0.3

Variables
  var1 "Variables 1"
    ks = 20000 [pN/nm]
    rfs = ks/(ks+Kf)
    rcs = ks/(kc+ks)
    Css = 20
    Vpss = Vp0+beta*Css
    L1ss = (Vpss-Vd)*Fp0*rcs/ks/Vpss
    Fmss = Kf/(Kf-gamma)*(F0+(alpha-gamma/Kf/rfs)*ks*L1ss/phi)
    xss = (ks*L1ss/phi/rfs-Fmss)/Kf+x0
    a = rcs*Fp0/Vpss/ks*(ks/Kf/rfs+1)
    b = rcs*Fp0*phi/(Kf*Vpss*ks)
    c = 1-gamma/Kf
    e = (alpha-gamma/Kf/rfs)*ks/phi
    tau = b*e-a*c+5
    dFm = 1000 [pN]
    taud = 80 [s]
    Dc = d0^2/taud

Probes
  pdom1: DomainPoint "Domain Point Probe 1"
    ppb1: PointExpr "Point Probe Expression 1" | expr = F; unit = pN; descr = Dependent variable F; table = tbl1

Geometry
  geom1 "Geometry 1" (2D, length unit µm)
    c1: Circle | r = R0
    fin: Finalize "Form Union"

Physics
  cdeq: ConvectionDiffusionEquation on domains 1
    dependent variable C
    Units.SourceTermQuantity = none
    Units.CustomSourceTermUnit = 1/s
    cdeq1: ConvectionDiffusionEquation (default) | f = -mu*((Vp0+beta*C)*(1-ks*L1/rcs/Fp0)-Vd); c = {Dc, 0, 0, Dc}; da = 1
    zflx1: ZeroFluxBoundary "Zero Flux 1" (default)
    init1: init "Initial Values 1" (default) | C = Css+rect2(x^2/r0^2+y^2/r0^2)*0
  dode: DomainODE "Podosome growth" on all domains
    dependent variable L1
    Units.DependentVariableQuantity = none
    Units.CustomDependentVariableUnit = nm
    Units.CustomSourceTermUnit = nm/s
    dode1: DistributedODE (default) | f = (Vp0+beta*C)*(1-ks*L1/rcs/Fp0)-Vd+phi/Kf*d(F,t); da = (1+ks/Kf/rfs)
    init1: init "Initial Values 1" (default) | z = L1ss
  dode2: DomainODE "Myosin dynamics" on all domains
    dependent variable F
    Units.DependentVariableQuantity = none
    Units.CustomDependentVariableUnit = pN
    Units.CustomSourceTermUnit = pN
    dode1: DistributedODE (default) | f = F0+(alpha-gamma/Kf/rfs)*ks*L1/phi-(1-gamma/Kf)*F; da = tau
    init1: init "Initial Values 1" (default) | F = Fmss+dFm*randn(x[1/um],y[1/um])

Mesh
  mesh1 "Mesh 1" (physics-controlled)
    size: MeshSizeDefault | hauto = 2

Studies
  std1 "Study 1"
    time: Transient "Time Dependent" | tlist = range(0,10,5000)

Solver configurations
  sol1 "Solution 1" (study std1)
    v1: Variables "Dependent Variables 1"
    t1: Time "Time-Dependent Solver 1"
      tlist = range(0,10,5000)
      timemethod = genalpha
      tstepsgenalpha = manual
      timestepgenalpha = 3
      dDef: Direct
      fc1: FullyCoupled | linsolver = dDef

Datasets
  dset1: Solution | solution = sol1

Tables
  tbl1: Table "Probe Table 1"
    Time (s) | Dependent variable C (pN), Point: (0, 0)
    0 | 16039.1
    10 | 16343.5
    20 | 16664.3
    30 | 16996.1
    40 | 17335.6
    50 | 17639.5
    60 | 17922.1
    70 | 18183.5
    80 | 18423.7
    90 | 18496.3
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  tbl2: Table
    // Point Evaluation 1
    Time (s) | Dependent variable C (1), Point: (0, 0) | Dependent variable L1 (µm), Point: (0, 0) | Dependent variable F (N), Point: (0, 0) | tau (s), Point: (0, 0)
    0 | 20 | 0.000209581 | 4.9466e-09 | 8.71677
    2 | 20.664 | 0.000217281 | 5.0684e-09 | 8.71677
    4 | 21.9566 | 0.000224803 | 5.19919e-09 | 8.71677
    6 | 23.8779 | 0.000232149 | 5.33894e-09 | 8.71677
    8 | 26.8589 | 0.000238745 | 5.48815e-09 | 8.71677
    10 | 30.1726 | 0.000244755 | 5.63725e-09 | 8.71677
    12 | 33.819 | 0.000250179 | 5.78624e-09 | 8.71677
    14 | 37.7077 | 0.000254043 | 5.92562e-09 | 8.71677
    16 | 41.4771 | 0.000256996 | 6.05558e-09 | 8.71677
    18 | 45.1273 | 0.000259037 | 6.17614e-09 | 8.71677
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  tbl3: Table
    // Surface Integration 1
    Time (s) | Dependent variable C (m^2) | Dependent variable C (um^2) | Dependent variable C (um^2)
    0 | 6.28319e-09 | 6283.19 | 6283.19
    2 | 6.28528e-09 | 6285.28 | 6287.88
    4 | 6.28927e-09 | 6289.27 | 6296.97
    6 | 6.29514e-09 | 6295.14 | 6310.44
    8 | 6.30424e-09 | 6304.24 | 6332.21
    10 | 6.31453e-09 | 6314.53 | 6357.43
    12 | 6.32602e-09 | 6326.02 | 6386.11
    14 | 6.33904e-09 | 6339.04 | 6419.36
    16 | 6.35237e-09 | 6352.37 | 6453.08
    18 | 6.366e-09 | 6366 | 6487.25
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
Plots
  pg9: PlotGroup1D "Probe Plot Group 9"
    tblp1: Table "Probe Table Graph 1" | table = tbl1